// SBML level 2 version 1
// Model Starts Here

model untitled()

  // Compartments:
  compartment compartment = 1;
  compartment Compartment_0 = 1e-12;
  compartment Compartment_1 = 2e-13;

  // Species:
  species SnoNc in Compartment_0 = 10.0029;
  species Smurf2c in Compartment_0 = 16.67065;
  species SMAD3c in Compartment_0 = 50.03901;
  species Smurf2_SMAD7c in Compartment_0 = 2.101794;
  species TBR2m in Compartment_0 = 11.4184;
  species SMAD4c in Compartment_0 = 50.0229;
  species SMAD7c in Compartment_0 = 6.250584;
  species TBR1m in Compartment_0 = 11.4184;
  species TBR2i in Compartment_0 = 9.990466;
  species TBR1i in Compartment_0 = 9.990466;
  species SMAD4n in Compartment_1 = 50.02324;
  species SMAD7n in Compartment_1 = 11.23213;
  species Smurf2n in Compartment_1 = 15.40158;
  species SnoNn in Compartment_1 = 32.86713;
  species SMAD3n in Compartment_1 = 13.64714;
  species Smurf2_SMAD7n in Compartment_1 = 3.37101;
  species SMAD3p_2n in Compartment_1 = 0;
  species SMAD4_SMAD3p_2n in Compartment_1 = 0;
  species SnoN_SMAD3pn in Compartment_1 = 0;
  species Smurf2_SMAD3p_SnoNn in Compartment_1 = 0;
  species SnoN_SMAD4_SMAD3p_2n in Compartment_1 = 0;
  species SMAD3pn in Compartment_1 = 0;
  species TGF_TBR2m in Compartment_0 = 0;
  species TGF_TBR2_TBR1m in Compartment_0 = 0;
  species TGF_TBR2_TBR1pm in Compartment_0 = 0;
  species TGF_TBR2_TBR1p_cPML_SMAD3i in Compartment_0 = 0;
  species SMAD3p_2c in Compartment_0 = 0;
  species SMAD4_SMAD3p_2c in Compartment_0 = 0;
  species Smurf2_SMAD7_TGF_TBR2_TBR1pm in Compartment_0 = 0;
  species Smurf2_SMAD7_TGF_TBR2_TBR1pi in Compartment_0 = 0;
  species SnoN_SMAD3pc in Compartment_0 = 0;
  species Smurf2_SMAD3p_SnoNc in Compartment_0 = 0;
  species SMAD3pc in Compartment_0 = 0;
  species TGF_TBR2_TBR1pi in Compartment_0 = 0;
  species cPML in Compartment_0 = 0;
  species TGF_TBR2_TBR1p_cPMLm in Compartment_0 = 0;
  species TGF_TBR2_TBR1p_cPMLi in Compartment_0 = 0;
  species cPMLmRNA in Compartment_0 = 0;
  species Smad7cmRNA in Compartment_0 = 0;
  species SnoNcmRNA in Compartment_0 = 0;
  species $TGF in Compartment_0 = 0;
  species $DNA in Compartment_1 = 0;
  species TGF_TBR2_TBR1p_SMAD3i in Compartment_0 = 0;
  species TGF_TBR2_TBR1p_SMAD3m in Compartment_0 = 0;
  species SMAD7_TGF_TBR2_TBR1pm in Compartment_0 = 0;
  species SMAD7_TGF_TBR2_TBR1pi in Compartment_0 = 0;

  // Reactions:
  J0: $TGF + TBR2m -> TGF_TBR2m; v;
  J1: TGF_TBR2m + TBR1m -> TGF_TBR2_TBR1m; v;
  J2: TGF_TBR2_TBR1m -> TGF_TBR2_TBR1pm; v;
  J3: cPML + TGF_TBR2_TBR1pm => TGF_TBR2_TBR1p_cPMLm; v;
  J4: SMAD3c + TGF_TBR2_TBR1p_cPMLi => TGF_TBR2_TBR1p_cPML_SMAD3i; v;
  J5: TGF_TBR2_TBR1p_cPML_SMAD3i => TGF_TBR2_TBR1p_cPMLi + SMAD3pc; v;
  J6: TGF_TBR2_TBR1p_cPMLi => cPML + TGF_TBR2_TBR1pi; v;
  J7: $DNA => cPMLmRNA; v;
  J8: cPMLmRNA => cPML; v;
  J9: 2 SMAD3pc => SMAD3p_2c; v;
  J10: 2 SMAD3pn => SMAD3p_2n; v;
  J11: SMAD4c + SMAD3p_2c => SMAD4_SMAD3p_2c; v;
  J12: SMAD4n + SMAD3p_2n => SMAD4_SMAD3p_2n; v;
  J13: $DNA => Smad7cmRNA; v;
  J14: $DNA => SnoNcmRNA; v;
  J15: Smurf2n + SMAD7n => Smurf2_SMAD7n; J15_k*Smurf2n*SMAD7n;
    J15_k = 0.1;
  J16: SMAD7c + Smurf2c => Smurf2_SMAD7c; v;
  J17: Smurf2_SMAD7c + TGF_TBR2_TBR1m => Smurf2_SMAD7_TGF_TBR2_TBR1pm; v;
  J18: Smurf2_SMAD7_TGF_TBR2_TBR1pm => Smurf2c; v;
  J19: Smurf2_SMAD7c + TGF_TBR2_TBR1pi => Smurf2_SMAD7_TGF_TBR2_TBR1pi; v;
  J20: Smurf2_SMAD7_TGF_TBR2_TBR1pi => Smurf2c; v;
  J21: SnoNn + SMAD3pn => SnoN_SMAD3pn; v;
  J22: SnoN_SMAD3pn + Smurf2n => Smurf2_SMAD3p_SnoNn; J22_k*SnoN_SMAD3pn*Smurf2n;
    J22_k = 0.1;
  J23: SMAD3pc + SnoNc => SnoN_SMAD3pc; J23_k*SMAD3pc*SnoNc;
    J23_k = 0.1;
  J24: Smurf2c + SnoN_SMAD3pc => Smurf2_SMAD3p_SnoNc; J24_k*Smurf2c*SnoN_SMAD3pc;
    J24_k = 0.1;
  J25: Smurf2_SMAD3p_SnoNc => Smurf2c + SMAD3pc; J25_k*Smurf2_SMAD3p_SnoNc;
    J25_k = 0.1;
  J26: SMAD3pc => SMAD3c; J26_k*SMAD3pc;
    J26_k = 0.1;
  J27: SMAD4_SMAD3p_2n + SnoNn => SnoN_SMAD4_SMAD3p_2n; J27_k*SMAD4_SMAD3p_2n*SnoNn;
    J27_k = 0.1;
  J28: TBR2m => TBR2i; J28_k*TBR2m;
    J28_k = 0.1;
  J29: TBR1m => TBR1i; J29_k*TBR1m;
    J29_k = 0.1;
  J30: TGF_TBR2_TBR1m => TGF_TBR2_TBR1pi; J30_k*TGF_TBR2_TBR1m;
    J30_k = 0.1;
  J31: SMAD3c => SMAD3n; J31_k*SMAD3c;
    J31_k = 0.1;
  J32: SMAD3pc => SMAD3pn; J32_k*SMAD3pc;
    J32_k = 0.1;
  J33: SMAD3p_2c => SMAD3p_2n; J33_k*SMAD3p_2c;
    J33_k = 0.1;
  J34: SMAD4c => SMAD4n; J34_k*SMAD4c;
    J34_k = 0.1;
  J35: SMAD4_SMAD3p_2c => SMAD4_SMAD3p_2n; J35_k*SMAD4_SMAD3p_2c;
    J35_k = 0.1;
  J36: SMAD7c => SMAD7n; J36_k*SMAD7c;
    J36_k = 0.1;
  J37: SnoNc => SnoNn; J37_k*SnoNc;
    J37_k = 0.1;
  J38: Smurf2c => Smurf2n; J38_k*Smurf2c;
    J38_k = 0.1;
  J39: Smurf2_SMAD7c => Smurf2_SMAD7n; J39_k*Smurf2_SMAD7c;
    J39_k = 0.1;
  J40: SnoN_SMAD3pc => SnoN_SMAD3pn; J40_k*SnoN_SMAD3pc;
    J40_k = 0.1;
  J41: Smurf2_SMAD3p_SnoNc => Smurf2_SMAD3p_SnoNn; J41_k*Smurf2_SMAD3p_SnoNc;
    J41_k = 0.1;
  J42: SMAD3pn => SMAD3n; v;
  J43: TGF_TBR2_TBR1p_cPMLm => TGF_TBR2_TBR1p_cPMLi; v;
  J44: Smad7cmRNA => SMAD7c; v;
  J45: SnoNcmRNA => SnoNc; v;
  J46: TGF_TBR2_TBR1pm + SMAD3c => TGF_TBR2_TBR1p_SMAD3m; v;
  J47: TGF_TBR2_TBR1pi + SMAD3c => TGF_TBR2_TBR1p_SMAD3i; v;
  J48: TGF_TBR2_TBR1p_SMAD3i => SMAD3pc + TGF_TBR2_TBR1pi; v;
  J49: TGF_TBR2_TBR1p_SMAD3m => SMAD3pc + TGF_TBR2_TBR1pm; v;
  J50: TGF_TBR2_TBR1m + SMAD7c => SMAD7_TGF_TBR2_TBR1pm; J50_k*TGF_TBR2_TBR1m*SMAD7c;
    J50_k = 0.1;
  J51: TGF_TBR2_TBR1pi + SMAD7c => SMAD7_TGF_TBR2_TBR1pi; J51_k*TGF_TBR2_TBR1pi*SMAD7c;
    J51_k = 0.1;
  J52: SMAD7_TGF_TBR2_TBR1pm + Smurf2c => Smurf2_SMAD7_TGF_TBR2_TBR1pm; J52_k*SMAD7_TGF_TBR2_TBR1pm*Smurf2c;
    J52_k = 0.1;
  J53: SMAD7_TGF_TBR2_TBR1pi + Smurf2c => Smurf2_SMAD7_TGF_TBR2_TBR1pi; J53_k*SMAD7_TGF_TBR2_TBR1pi*Smurf2c;
    J53_k = 0.1;
end
